<?xml version="1.0"?>
<?xml-stylesheet type="text/xsl" href="http://jsbsim.sourceforge.net/JSBSim.xsl"?>

<fdm_config name="Lineage1000" version="2.0" release="BETA"
   xmlns:xsi="http://www.w3.org/2001/XMLSchema-instance"
   xsi:noNamespaceSchemaLocation="http://jsbsim.sourceforge.net/JSBSim.xsd">

	<fileheader>
  		<author>Peter Brendt/Narendran Muraleedharan</author>
  		<filecreationdate> 2015-12-15 </filecreationdate>el
  		<version>$Revision: 1.10 $</version>
  		<description> Flight Dynamics Model for the 747-8VIP and VVIP </description>
	</fileheader>

	<!-- UNIT CONVERSIONS :
	1 meter = 3.2 feet
	1 meter = 39.4 inches
	1 sq. m = 10.24 sq. ft.
	1 feet  = 12 inches -->

	<metrics>
	   	<wingarea  unit="M2">  554.00 </wingarea>
	   	<wingspan  unit="M" >   68.50 </wingspan>
	   	<wing_incidence unit="DEG"> 2 </wing_incidence>
	   	<chord     unit="FT" >   26.54 </chord>
	   	<htailarea unit="FT2"> 1071.23 </htailarea>
	   	<htailarm  unit="FT" >   35.37 </htailarm>
	   	<vtailarea unit="FT2"> 1469.09 </vtailarea>
	   	<vtailarm  unit="FT" >   34.02 </vtailarm>
	   	<location name="AERORP" unit="M">
     			<x>   -1.30 </x>
     			<y>    0.00 </y>
			<z>    0.00 </z>
   		</location>

   		<location name="EYEPOINT" unit="IN">
     			<x> 210.29 </x>
     			<y> -32.00 </y>
     			<z>  80.00 </z>
	   	</location>

   		<location name="VRP" unit="M">
     			<x> 37.6928 </x>
     			<y> 0 </y>
     			<z> 4 </z>
   		</location>
	</metrics>

	<mass_balance>
		<ixx unit="SLUG*FT2">  18861051 </ixx>
		<iyy unit="SLUG*FT2">  26417499 </iyy>
		<izz unit="SLUG*FT2">  45452486 </izz>
		<emptywt unit="LBS" >    469665 </emptywt>
		<location name="CG" unit="M">
			<x>  -1.30 </x>
			<y>   0.00 </y>
			<z>   0.00 </z>
		</location>

		<!-- pointmass name="Payload">
			<description> 104270 LBS + full (413905 LBS) fuel should bring model up to entered max weight</description>
			<weight unit="LBS">  52135.0 </weight>
			<location name="POINTMASS" unit="IN">
				<x> 2577.29 </x>
				<y>   0.00 </y>
				<z> -75.10 </z>
			</location>
		</pointmass -->

		<pointmass name="Crew">
			<weight unit="LBS">400</weight>
			<location name="POINTMASS" unit="IN">
				<x>-416.458</x>
				<y>0</y>
				<z>1.14</z>
			</location>
		</pointmass>

		<pointmass name="Passengers">
			<weight unit="LBS">3000</weight>
			<location name="POINTMASS" unit="IN">
				<x>-100.102</x>
				<y>0</y>
				<z>1.14</z>
			</location>
		</pointmass>

	</mass_balance>

	<ground_reactions>

		<!-- Nose Gear Contact Point -->
		<contact type="BOGEY" name="NOSE">
			<location unit="M">
				<x> -29.7925 </x>
				<y>   0.0000 </y>
				<z>  -3.6639 </z>
			</location>
			<static_friction>  0.80 </static_friction>
			<dynamic_friction> 0.50 </dynamic_friction>
			<rolling_friction> 0.02 </rolling_friction>
			<spring_coeff unit="LBS/FT">      296352.00 </spring_coeff>
			<damping_coeff unit="LBS/FT/SEC"> 493920.00 </damping_coeff>
			<max_steer unit="DEG"> 65.00 </max_steer>
			<brake_group>NONE</brake_group>
			<retractable>1</retractable>
		</contact>

		<contact type="BOGEY" name="LEFT_MAIN_FWD">
			<location unit="M">
				<x> -1.2862 </x>
				<y> -5.3046 </y>
				<z> -3.6639 </z>
			</location>
			<static_friction>  0.80 </static_friction>
			<dynamic_friction> 0.50 </dynamic_friction>
			<rolling_friction> 0.02 </rolling_friction>
			<spring_coeff unit="LBS/FT">      987840.00 </spring_coeff>
			<damping_coeff unit="LBS/FT/SEC"> 493920.00 </damping_coeff>
			<max_steer unit="DEG">0</max_steer>
			<brake_group>LEFT</brake_group>
			<retractable>1</retractable>
		</contact>

		<contact type="BOGEY" name="LEFT_MAIN_RWD">
			<location unit="M">
				<x>  2.1290 </x>
				<y> -2.1290 </y>
				<z> -3.6639 </z>
			</location>
			<static_friction>  0.80 </static_friction>
			<dynamic_friction> 0.50 </dynamic_friction>
			<rolling_friction> 0.02 </rolling_friction>
			<spring_coeff unit="LBS/FT">      987840.00 </spring_coeff>
			<damping_coeff unit="LBS/FT/SEC"> 493920.00 </damping_coeff>
			<max_steer unit="DEG">0</max_steer>
			<brake_group>LEFT</brake_group>
			<retractable>1</retractable>
		</contact>

		<contact type="BOGEY" name="RIGHT_MAIN_FWD">
			<location unit="M">
				<x> -1.2862 </x>
				<y>  5.3046 </y>
				<z> -3.6639 </z>
			</location>
			<static_friction>  0.80 </static_friction>
			<dynamic_friction> 0.50 </dynamic_friction>
			<rolling_friction> 0.02 </rolling_friction>
			<spring_coeff unit="LBS/FT">      987840.00 </spring_coeff>
			<damping_coeff unit="LBS/FT/SEC"> 493920.00 </damping_coeff>
			<max_steer unit="DEG">0</max_steer>
			<brake_group>LEFT</brake_group>
			<retractable>1</retractable>
		</contact>

		<contact type="BOGEY" name="RIGHT_MAIN_RWD">
			<location unit="M">
				<x>  2.1290 </x>
				<y>  2.1290 </y>
				<z> -3.6639 </z>
			</location>
			<static_friction>  0.80 </static_friction>
			<dynamic_friction> 0.50 </dynamic_friction>
			<rolling_friction> 0.02 </rolling_friction>
			<spring_coeff unit="LBS/FT">      987840.00 </spring_coeff>
			<damping_coeff unit="LBS/FT/SEC"> 493920.00 </damping_coeff>
			<max_steer unit="DEG">0</max_steer>
			<brake_group>LEFT</brake_group>
			<retractable>1</retractable>
		</contact>

		<!-- Left Wing Tip Contact Point -->
  		<!-- contact type="STRUCTURE" name="LEFT_WING_TIP">
    			<location unit="IN">
     				<x> 102.44 </x>
     				<y> -490.924 </y>
     				<z> 10.64 </z>
    			</location>
	    		<static_friction>  0.9 </static_friction>
    			<dynamic_friction> 0.8 </dynamic_friction>
    			<spring_coeff unit="LBS/FT">      200000.00 </spring_coeff>
    			<damping_coeff unit="LBS/FT/SEC"> 10000.00 </damping_coeff>
    			<brake_group> NONE </brake_group>
    			<retractable>0</retractable>
		</contact -->

		<!-- contact type="STRUCTURE" name="LEFT_WING">
			<location unit="IN">
				<x> 2577.29 </x>
				<y> -112.37 </y>
				<z> -75.10 </z>
			</location>
			<static_friction>  1.00 </static_friction>
			<dynamic_friction> 1.00 </dynamic_friction>
			<spring_coeff unit="LBS/FT">      987840.00 </spring_coeff>
			<damping_coeff unit="LBS/FT/SEC"> 987840.00 </damping_coeff>
		</contact>

		<contact type="STRUCTURE" name="RIGHT_WING">
			<location unit="IN">
				<x> 2577.29 </x>
				<y> 112.37 </y>
				<z> -75.10 </z>
			</location>
			<static_friction>  1.00 </static_friction>
			<dynamic_friction> 1.00 </dynamic_friction>
			<spring_coeff unit="LBS/FT">      987840.00 </spring_coeff>
			<damping_coeff unit="LBS/FT/SEC"> 987840.00 </damping_coeff>
		</contact -->

		<!-- Still missing contact points for nose and tail for ditching and tail strikes -->

	</ground_reactions>

	<!-- 4 x General GEnx-2B67 Engines -->
	<propulsion>

		<engine file="GEnx-2B67">
			<location unit="M">
				<x> -2.17925 </x>
				<y>-21.9800 </y>
				<z> -0.1690 </z>
			</location>
			<orient unit="DEG">
				<pitch> 0.00 </pitch>
				<roll>  0.00 </roll>
				<yaw>   0.00 </yaw>
			</orient>
			<feed>5</feed>
			<feed>0</feed>
			<feed>7</feed>
			<feed>2</feed>
			<feed>3</feed>
			<thruster file="direct">
				<location unit="M">
					<x> -2.17925 </x>
					<y>-21.9800 </y>
					<z> -0.1690 </z>
				</location>
				<orient unit="DEG">
					<pitch> 0.00 </pitch>
					<roll>  0.00 </roll>
					<yaw>   0.00 </yaw>
				</orient>
			</thruster>
		</engine>

		<engine file="GEnx-2B67">
			<location unit="M">
				<x> -6.8347 </x>
				<y>-12.5224 </y>
				<z> -2.3228 </z>
			</location>
			<orient unit="DEG">
				<pitch> 0.00 </pitch>
				<roll>  0.00 </roll>
				<yaw>   0.00 </yaw>
			</orient>
			<feed>5</feed>
			<feed>0</feed>
			<feed>7</feed>
			<feed>2</feed>
			<feed>3</feed>
			<thruster file="direct">
				<location unit="M">
					<x> -6.8347 </x>
					<y>-12.5224 </y>
					<z> -2.3228 </z>
				</location>
				<orient unit="DEG">
					<pitch> 0.00 </pitch>
					<roll>  0.00 </roll>
					<yaw>   0.00 </yaw>
				</orient>
			</thruster>
		</engine>

		<engine file="GEnx-2B67">
			<location unit="M">
				<x> -6.8347 </x>
				<y> 12.5224 </y>
				<z> -2.3228 </z>
			</location>
			<orient unit="DEG">
				<pitch> 0.00 </pitch>
				<roll>  0.00 </roll>
				<yaw>   0.00 </yaw>
			</orient>
			<feed>6</feed>
			<feed>0</feed>
			<feed>7</feed>
			<feed>1</feed>
			<feed>4</feed>
			<thruster file="direct">
				<location unit="M">
					<x> -6.8347 </x>
					<y> 12.5224 </y>
					<z> -2.3228 </z>
				</location>
				<orient unit="DEG">
					<pitch> 0.00 </pitch>
					<roll>  0.00 </roll>
					<yaw>   0.00 </yaw>
				</orient>
			</thruster>
		</engine>

		<engine file="GEnx-2B67">
			<location unit="M">
				<x> -2.17925 </x>
				<y> 21.9800 </y>
				<z> -0.1690 </z>
			</location>
			<orient unit="DEG">
				<pitch> 0.00 </pitch>
				<roll>  0.00 </roll>
				<yaw>   0.00 </yaw>
			</orient>
			<feed>6</feed>
			<feed>0</feed>
			<feed>7</feed>
			<feed>1</feed>
			<feed>4</feed>
			<thruster file="direct">
				<location unit="M">
					<x> -2.17925 </x>
					<y> 21.9800 </y>
					<z> -0.1690 </z>
				</location>
				<orient unit="DEG">
					<pitch> 0.00 </pitch>
					<roll>  0.00 </roll>
					<yaw>   0.00 </yaw>
				</orient>
			</thruster>
		</engine>

		<!-- Center -->
		<tank type="FUEL" number="0">
			<location unit="M">
				<x> -2 </x>
				<y>  0 </y>
				<z> -1.45 </z>
			</location>
			<priority>2</priority>
			<capacity unit="LBS"> 116490 </capacity>
			<contents unit="LBS"> 116490 </contents>
		</tank>

		<!-- Main#2 -->
		<tank type="FUEL" number="1">
			<location unit="M">
				<x> -5.6 </x>
				<y> -8 </y>
				<z> -1.45 </z>
			</location>
			<priority>3</priority>
			<capacity unit="LBS"> 107494 </capacity>
			<contents unit="LBS"> 107494 </contents>
		</tank>

		<!-- Main#3 -->
		<tank type="FUEL" number="2">
			<location unit="M">
				<x> -5.6 </x>
				<y>  8 </y>
				<z> -1.45 </z>
			</location>
			<priority>3</priority>
			<capacity unit="LBS"> 107494 </capacity>
			<contents unit="LBS"> 107494 </contents>
		</tank>

		<!-- Main#1 -->
		<tank type="FUEL" number="3">
			<location unit="M">
				<x> -0.2 </x>
				<y> -17.1 </y>
				<z> -0.85 </z>
			</location>
			<priority>3</priority>
			<capacity unit="LBS"> 29695 </capacity> # Lineage V1 3200
			<contents unit="LBS"> 29695 </contents>
		</tank>

		<!-- Main#4 -->
		<tank type="FUEL" number="4">
			<location unit="M">
				<x> -0.2 </x>
				<y>  17.1 </y>
				<z> -0.85 </z>
			</location>
			<priority>3</priority>
			<capacity unit="LBS"> 29695 </capacity>
			<contents unit="LBS"> 29695 </contents>
		</tank>

		<!-- Res#1 -->
		<tank type="FUEL" number="5">
			<location unit="M">
				<x> -0.9 </x>
				<y> -26.3 </y>
				<z> 0.15 </z>
			</location>
			<priority>1</priority>
			<capacity unit="LBS"> 8858 </capacity>
			<contents unit="LBS"> 8858 </contents>
		</tank>

		<!-- Res#4 -->
		<tank type="FUEL" number="6">
			<location unit="M">
				<x> -0.9 </x>
				<y> 26.3 </y>
				<z> 0.15 </z>
			</location>
			<priority>1</priority>
			<capacity unit="LBS"> 8858 </capacity>
			<contents unit="LBS"> 8858 </contents>
		</tank>

		<!-- Horiz. Stab. -->
		<tank type="FUEL" number="7">
			<location unit="M">
				<x> 29.9 </x>
				<y> 0 </y>
				<z> 2.86 </z>
			</location>
			<priority>2</priority>
			<capacity unit="LBS"> 22572 </capacity>
			<contents unit="LBS"> 22572 </contents>
		</tank>

	</propulsion>

	<system file="pushback"/>

	<flight_control name="FCS: 747-8VIP">

		<channel name="Pitch">

			<summer name="Pitch Trim Sum">
				<input>fcs/elevator-cmd-norm</input>
				<input>fcs/pitch-trim-cmd-norm</input>
				<clipto>
					<min> -1 </min>
					<max>  1 </max>
				</clipto>
			</summer>

			<aerosurface_scale name="Elevator Control">
				<input>fcs/pitch-trim-sum</input>
				<range>
					<min> -0.35 </min>
					<max>  0.35 </max>
				</range>
				<output>fcs/elevator-pos-rad</output>
			</aerosurface_scale>

			<aerosurface_scale name="elevator normalization">
				<input>fcs/elevator-pos-rad</input>
				<domain>
					<min> -0.35 </min>
					<max>  0.35 </max>
				</domain>
				<range>
					<min> -1 </min>
					<max>  1 </max>
				</range>
				<output>fcs/elevator-pos-norm</output>
			</aerosurface_scale>

		</channel>

		<channel name="Roll">

			<summer name="Roll Trim Sum">
				<input>fcs/aileron-cmd-norm</input>
				<input>fcs/roll-trim-cmd-norm</input>
				<clipto>
					<min> -1 </min>
					<max>  1 </max>
				</clipto>
			</summer>

			<aerosurface_scale name="Left Aileron Control">
				<input>fcs/roll-trim-sum</input>
				<range>
					<min> -0.25 </min>
					<max>  0.25 </max>
				</range>
				<output>fcs/left-aileron-pos-rad</output>
			</aerosurface_scale>

			<aerosurface_scale name="Right Aileron Control">
				<input>fcs/roll-trim-sum</input>
				<range>
					<min> -0.25 </min>
					<max>  0.25 </max>
				</range>
				<output>fcs/right-aileron-pos-rad</output>
			</aerosurface_scale>

			<aerosurface_scale name="left aileron normalization">
				<input>fcs/left-aileron-pos-rad</input>
				<domain>
					<min> -0.25 </min>
					<max>  0.25 </max>
				</domain>
				<range>
					<min> -1 </min>
					<max>  1 </max>
				</range>
				<output>fcs/left-aileron-pos-norm</output>
			</aerosurface_scale>

			<aerosurface_scale name="right aileron normalization">
				<input>fcs/right-aileron-pos-rad</input>
				<domain>
					<min> -0.25 </min>
					<max>  0.25 </max>
				</domain>
				<range>
					<min> -1 </min>
					<max>  1 </max>
				</range>
				<output>fcs/right-aileron-pos-norm</output>
			</aerosurface_scale>

		</channel>

		<channel name="Yaw">

			<summer name="Rudder Command Sum">
				<input>fcs/rudder-cmd-norm</input>
				<input>fcs/yaw-trim-cmd-norm</input>
				<clipto>
					<min> -0.35 </min>
					<max>  0.35 </max>
				</clipto>
			</summer>

			<scheduled_gain name="Yaw Damper Rate">
				<input>velocities/r-aero-rad_sec</input>
				<table>
					<independentVar>aero/qbar-psf</independentVar>
					<tableData>
						 3.0000   0.0000
						11.0000   2.0000
					</tableData>
				</table>
			</scheduled_gain>

			<scheduled_gain name="Yaw Damper Beta">
				<input>aero/beta-rad</input>
				<table>
					<independentVar>aero/qbar-psf</independentVar>
					<tableData>
						 3.0000   0.0000
						11.0000   0.0000
					</tableData>
				</table>
			</scheduled_gain>

			<summer name="Yaw Damper Sum">
				<input>fcs/yaw-damper-beta</input>
				<input>fcs/yaw-damper-rate</input>
				<clipto>
					<min>-0.2000</min>
					<max>0.2000</max>
				</clipto>
			</summer>

			<scheduled_gain name="Yaw Damper Final">
				<input>fcs/yaw-damper-sum</input>
				<table>
					<independentVar>aero/qbar-psf</independentVar>
					<tableData>
						2.9900   0.0000
						3.0000   1.0000
					</tableData>
				</table>
			</scheduled_gain>

			<summer name="Rudder Sum">
				<input>fcs/rudder-command-sum</input>
				<input>fcs/yaw-damper-final</input>
				<clipto>
					<min> -1 </min>
					<max>  1 </max>
				</clipto>
			</summer>

			<aerosurface_scale name="Rudder Control">
				<input>fcs/rudder-sum</input>
				<range>
					<min> -0.35 </min>
					<max>  0.35 </max>
				</range>
				<output>fcs/rudder-pos-rad</output>
			</aerosurface_scale>

			<aerosurface_scale name="rudder normalization">
				<input>fcs/rudder-pos-rad</input>
				<domain>
					<min> -0.35 </min>
					<max>  0.35 </max>
				</domain>
				<range>
					<min> -1 </min>
					<max>  1 </max>
				</range>
				<output>fcs/rudder-pos-norm</output>
			</aerosurface_scale>

		</channel>

		<channel name="Flaps">

			<kinematic name="Flaps Control">
				<input>fcs/flap-cmd-norm</input>
				<traverse>
					<setting>
						<position>0.0</position>
						<time>0.0000</time>
					</setting>
					<setting>
						<position>10.000</position>
						<time>5.0000</time>
					</setting>
					<setting>
						<position>25.0000</position>
						<time>10.0000</time>
					</setting>
					<setting>
						<position>30.0000</position>
						<time>10.0000</time>
					</setting>
					<setting>
						<position>40.0000</position>
						<time>10.0000</time>
					</setting>
				</traverse>
				<output>fcs/flap-pos-deg</output>
			</kinematic>

			<aerosurface_scale name="flap normalization">
				<input>fcs/flap-pos-deg</input>
				<domain>
					<min>  0 </min>
					<max> 35 </max>
				</domain>
				<range>
					<min> 0 </min>
					<max> 1 </max>
				</range>
				<output>fcs/flap-pos-norm</output>
			</aerosurface_scale>

		</channel>

		<channel name="Landing Gear">

			<kinematic name="Gear Control">
				<input>gear/gear-cmd-norm</input>
				<traverse>
					<setting>
						<position> 0 </position>
						<time>     0 </time>
					</setting>
					<setting>
						<position> 1 </position>
						<time>     15 </time>
					</setting>
				</traverse>
				<output>gear/gear-pos-norm</output>
			</kinematic>

		</channel>

		<channel name="Speedbrake">

			<kinematic name="Speedbrake Control">
				<input>fcs/speedbrake-cmd-norm</input>
				<traverse>
					<setting>
						<position> 0 </position>
						<time>     0 </time>
					</setting>
					<setting>
						<position> 1 </position>
						<time>     1 </time>
					</setting>
				</traverse>
				<output>fcs/speedbrake-pos-norm</output>
			</kinematic>

		</channel>

	</flight_control>

	<aerodynamics>

		<!-- Lift due to ground effects to make the take off faster -->
		<function name="aero/function/kCLge">
			<description>Change_in_lift_due_to_ground_effect</description>
			<product>
				<table>
					<independentVar>aero/h_b-mac-ft</independentVar>
					<tableData>
						0.0000	1.2000
						0.1000	1.3200
						0.1500	1.3600
						0.2000	1.4000
						1.1000	1.2000
						1.5000  1.0000
					</tableData>
				</table>
			</product>
		</function>

		<axis name="LIFT">

			<function name="aero/coefficient/CLalpha">
				<description>Lift_due_to_alpha</description>
				<product>
					<property>aero/qbar-psf</property>
					<property>metrics/Sw-sqft</property>
					<property>aero/function/kCLge</property>
					<table>
						<independentVar lookup="row">aero/alpha-rad</independentVar>
						<tableData>
							-0.20 -0.680
							 0.00  0.500
							 0.23  1.500
							 0.60  0.800
						</tableData>
					</table>
				</product>
			</function>

			<function name="aero/force/Lift_flap">
				<description>Delta Lift due to flaps</description>
				<product>
					<property>aero/qbar-psf</property>
					<property>metrics/Sw-sqft</property>
					<property>fcs/flap-pos-deg</property>
					<value> 0.055 </value>
				</product>
			</function>

			<function name="aero/force/Lift_speedbrake">
				<description>Delta Lift due to speedbrake</description>
				<product>
					<property>aero/qbar-psf</property>
					<property>metrics/Sw-sqft</property>
					<property>fcs/speedbrake-pos-norm</property>
					<value>-0.08</value>
				</product>
			</function>

			<function name="aero/force/Lift_elevator">
				<description>Lift due to Elevator Deflection</description>
				<product>
					<property>aero/qbar-psf</property>
					<property>metrics/Sw-sqft</property>
					<property>fcs/elevator-pos-rad</property>
					<value>0.25</value>
				</product>
			</function>

		</axis>

		<axis name="DRAG">

			<function name="aero/force/Drag_basic">
				<description>Drag at zero lift</description>
				<product>
					<property>aero/qbar-psf</property>
					<property>metrics/Sw-sqft</property>
					<table>
						<independentVar lookup="row">aero/alpha-rad</independentVar>
						<tableData>
							-1.57	 1.000
							-0.26	 0.018
							 0.00	 0.008
							 0.26	 0.012
							 1.57	 1.000
						</tableData>
					</table>
				</product>
			</function>

			<function name="aero/force/Drag_induced">
				<description>Induced drag</description>
				<product>
					<property>aero/qbar-psf</property>
					<property>metrics/Sw-sqft</property>
					<property>aero/cl-squared</property>
					<value>0.020</value>
				</product>
			</function>

			<function name="aero/force/Drag_mach">
				<description>Drag due to mach</description>
				<product>
					<property>aero/qbar-psf</property>
					<property>metrics/Sw-sqft</property>
					<table>
						<independentVar lookup="row">velocities/mach</independentVar>
						<tableData>
							 0.00	 0.000
							 0.79	 0.001
							 1.10	 0.043
							 1.80	 0.055
						</tableData>
					</table>
				</product>
			</function>

			<function name="aero/force/Drag_flap">
				<description>Drag due to flaps</description>
				<product>
					<property>aero/qbar-psf</property>
					<property>metrics/Sw-sqft</property>
					<property>fcs/flap-pos-deg</property>
					<value> 0.008 </value>
				</product>
			</function>

			<function name="aero/force/Drag_gear">
				<description>Drag due to gear</description>
				<product>
					<property>aero/qbar-psf</property>
					<property>metrics/Sw-sqft</property>
					<property>gear/gear-pos-norm</property>
					<value>0.003</value>
				</product>
			</function>

			<function name="aero/force/Drag_speedbrake">
				<description>Drag due to speedbrakes</description>
				<product>
					<property>aero/qbar-psf</property>
					<property>metrics/Sw-sqft</property>
					<property>fcs/speedbrake-pos-norm</property>
					<value>0.07</value>
				</product>
			</function>

			<function name="aero/force/Drag_beta">
				<description>Drag due to sideslip</description>
				<product>
					<property>aero/qbar-psf</property>
					<property>metrics/Sw-sqft</property>
					<table>
						<independentVar lookup="row">aero/beta-rad</independentVar>
						<tableData>
							-1.57	 1.230
							-0.26	 0.050
							 0.00	 0.000
							 0.26    0.050
							 1.57	 1.230
						</tableData>
					</table>
				</product>
			</function>

			<function name="aero/force/Drag_elevator">
				<description>Drag due to Elevator Deflection</description>
				<product>
					<property>aero/qbar-psf</property>
					<property>metrics/Sw-sqft</property>
					<abs><property>fcs/elevator-pos-norm</property></abs>
					<value>0.035</value>
				</product>
			</function>

		</axis>

		<axis name="SIDE">

			<function name="aero/force/Side_beta">
				<description>Side force due to beta</description>
				<product>
					<property>aero/qbar-psf</property>
					<property>metrics/Sw-sqft</property>
					<property>aero/beta-rad</property>
					<value>-1</value>
				</product>
			</function>

		</axis>

		<axis name="ROLL">

			<function name="aero/moment/Roll_beta">
				<description>Roll moment due to beta</description>
				<product>
					<property>aero/qbar-psf</property>
					<property>metrics/Sw-sqft</property>
					<property>metrics/bw-ft</property>
					<property>aero/beta-rad</property>
					<value>-0.1</value>
				</product>
			</function>

			<function name="aero/moment/Roll_damp">
				<description>Roll moment due to roll rate</description>
				<product>
					<property>aero/qbar-psf</property>
					<property>metrics/Sw-sqft</property>
					<property>metrics/bw-ft</property>
					<property>aero/bi2vel</property>
					<property>velocities/p-aero-rad_sec</property>
					<value>-0.4</value>
				</product>
			</function>

			<function name="aero/moment/Roll_yaw">
				<description>Roll moment due to yaw rate</description>
				<product>
					<property>aero/qbar-psf</property>
					<property>metrics/Sw-sqft</property>
					<property>metrics/bw-ft</property>
					<property>aero/bi2vel</property>
					<property>velocities/r-aero-rad_sec</property>
					<value>0.15</value>
				</product>
			</function>

			<function name="aero/moment/Roll_aileron">
				<description>Roll moment due to aileron</description>
				<product>
					<property>aero/qbar-psf</property>
					<property>metrics/Sw-sqft</property>
					<property>metrics/bw-ft</property>
					<property>fcs/left-aileron-pos-rad</property>
					<table>
						<independentVar lookup="row">velocities/mach</independentVar>
						<tableData>
							 0.0	 0.100
							 2.0	 0.033
						</tableData>
					</table>
				</product>
			</function>

			<function name="aero/moment/Roll_rudder">
				<description>Roll moment due to rudder</description>
				<product>
					<property>aero/qbar-psf</property>
					<property>metrics/Sw-sqft</property>
					<property>metrics/bw-ft</property>
					<property>fcs/rudder-pos-rad</property>
					<value>0.01</value>
				</product>
			</function>

		</axis>

		<axis name="PITCH">

			<function name="aero/moment/Pitch_alpha">
				<description>Pitch moment due to alpha</description>
				<product>
					<property>aero/qbar-psf</property>
					<property>metrics/Sw-sqft</property>
					<property>metrics/cbarw-ft</property>
					<property>aero/alpha-rad</property>
					<value>-0.6</value>
				</product>
			</function>

			<function name="aero/moment/Pitch_elevator">
				<description>Pitch moment due to elevator</description>
				<product>
					<property>aero/qbar-psf</property>
					<property>metrics/Sw-sqft</property>
					<property>metrics/cbarw-ft</property>
					<property>fcs/elevator-pos-rad</property>
					<table>
						<independentVar lookup="row">velocities/mach</independentVar>
						<tableData>
							 0.0000	 -1.3000
							 2.0000	 -0.3250
						</tableData>
					</table>
				</product>
			</function>

			<function name="aero/moment/Pitch_damp">
				<description>Pitch moment due to pitch rate</description>
				<product>
					<property>aero/qbar-psf</property>
					<property>metrics/Sw-sqft</property>
					<property>metrics/cbarw-ft</property>
					<property>aero/ci2vel</property>
					<property>velocities/q-aero-rad_sec</property>
					<value>-17</value>
				</product>
			</function>

			<function name="aero/moment/Pitch_alphadot">
				<description>Pitch moment due to alpha rate</description>
				<product>
					<property>aero/qbar-psf</property>
					<property>metrics/Sw-sqft</property>
					<property>metrics/cbarw-ft</property>
					<property>aero/ci2vel</property>
					<property>aero/alphadot-rad_sec</property>
					<value>-6</value>
				</product>
			</function>

		</axis>

		<axis name="YAW">

			<function name="aero/moment/Yaw_beta">
				<description>Yaw moment due to beta</description>
				<product>
					<property>aero/qbar-psf</property>
					<property>metrics/Sw-sqft</property>
					<property>metrics/bw-ft</property>
					<property>aero/beta-rad</property>
					<value>0.12</value>
				</product>
			</function>

			<function name="aero/moment/Yaw_damp">
				<description>Yaw moment due to yaw rate</description>
				<product>
					<property>aero/qbar-psf</property>
					<property>metrics/Sw-sqft</property>
					<property>metrics/bw-ft</property>
					<property>aero/bi2vel</property>
					<property>velocities/r-aero-rad_sec</property>
					<value>-0.15</value>
				</product>
			</function>

			<function name="aero/moment/Yaw_rudder">
				<description>Yaw moment due to rudder</description>
				<product>
					<property>aero/qbar-psf</property>
					<property>metrics/Sw-sqft</property>
					<property>metrics/bw-ft</property>
					<property>fcs/rudder-pos-rad</property>
					<value>-0.1</value>
				</product>
			</function>

			<function name="aero/moment/Yaw_aileron">
				<description>Adverse yaw</description>
				<product>
					<property>aero/qbar-psf</property>
					<property>metrics/Sw-sqft</property>
					<property>metrics/bw-ft</property>
					<property>fcs/left-aileron-pos-rad</property>
					<value>0</value>
				</product>
			</function>

		</axis>

	</aerodynamics>

	<external_reactions>
		<force name="pushback" frame="BODY">
			<location unit="IN">
				<x>294</x>
				<y>0</y>
				<z>-149</z>
			</location>
			<direction>
				<x>1</x>
				<y>0</y>
				<z>0</z>
			</direction>
		</force>
	</external_reactions>

</fdm_config>
